U_loadNom := 100  # Напряжение нагрузки [V]
i_load := 0.005  # Ток нагрузки [A]
U_supply := 12  # Напряжение питания бустерной схемы, [V]
R_T := 10*10^3
C_T := 4700*10^-12  # Частотозадающие параметры генератора ИС uc3843 [Ohm, F]
f_osc := 1.72/(R_T*C_T) = 36595.7  # Частота генератора ИС uc3842 [Hz]
C_boost := 4.7*10^-6  # Емкость бустерного конденсатора [F]
L := 100*10^-6  # Дроссель [H]
# Номиналы резисторов делителя напряжений обратной связи ИС uc3843 [Ohm]
R_1back := 1.2*10^6
R_2backPot := 20*10^3
R_3back := 10*10^3
U_backStop := 2.5  # Пороговое напряжение обратной связи, если выше него - ШИМ уменьшается
U_outMin := U_backStop*(R_1back + R_2backPot + R_3back)/(R_2backPot + R_3back) = 102.5  # Минимальное напряжение на выходе для данного делителя
U_outMax := U_backStop*(R_1back + R_2backPot + R_3back)/R_3back = 307.5  # Максимальное напряжение на выходе для данного делителя
